# Worksheet setting: ORIGIN = 1
P := [-20; 20]*J
h := [0; 36]*deg
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(21 J*90*deg/s)/0.5 = 65.9734 W
# Параметры РВП
# Уравнение движения
h_max := max(h) = 36 deg
t_max := 0.4 s
0.98^6*0.99^6 = 0.834003
v := h_max/t_max = 15 rpm
# Момент трения в подшипнике по линейной зависимости
M_bear := [-1; 1]*J  # момент трения
P_Mb := [-20; 20]*J  # при усилиий
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# Передаточное отношение
# планетарки
i_cherv := 33
i_pr := 4*i_cherv = 132
η := 0.95*0.7 = 0.665
i_pr_1 := i_pr = 132
# лопасть | черв | гайка | рвр до червяка
J_Σ := (0.008 kg*m^2/i_pr^2 + 0.152*10^-6*kg*m^2 + 3*10^-5*kg*m^2/i_pr^2 + 2.58*10^-5*kg*m^2/i_cherv^2)*1 = 0.63655 kg*mm^2
t_max = 0.4 s
Φ(t) :=
    1 if t ≥ 0
    0 otherwise
20
t_1 := 70 ms
t_2 := 70 ms
ω_max1 := h_max/(t_max - 0.5*t_1 - 0.5*t_2) = 109.091 deg/s
ω_max := h_max*i_pr/(t_max - 0.5*t_1 - 0.5*t_2) = 2400 rpm
ω(t) := ω_max/t_1*t*(1 - Φ(t - t_1)) + ω_max*(Φ(t - t_1) - Φ(t - (t_max - t_2))) + ω_max/t_2*(t_max - t)*Φ(t - (t_max - t_2))
ε(t) := ω_max/t_1*(1 - Φ(t - t_1)) - ω_max/t_2*Φ(t - (t_max - t_2))
φ(t) := ω_max/t_1*t^2/2*(1 - Φ(t - t_1)) + (ω_max*t_1/2 + ω_max*(t - t_1))*(Φ(t - t_1) - Φ(t - (t_max - t_2))) + (ω_max*t_1/2 + ω_max*(t_max - t_1 - t_2) + (-ω_max*(t - t_max)^2/(2*t_2)) + ω_max*t_2/2)*Φ(t - (t_max - t_2))
h_s(t) := φ(t)/i_pr
h1(t) := h_s(t)
n := 10000
t := 0, t_max/n .. t_max
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6800 rpm*0.043*J = 30.6201 W
M_bb(t) := linterp(P_Mb, M_bear, linterp(h, P, h_s(t)))/(i_pr*η)
# момент в упорном подшипнике по линейному закону в зависимости от нагрузки
linterp(h, P, h_s(t))*1/0.5 + M_bb(t)
M_nagr(t) := linterp(h, P, h_s(t))/(η*i_pr)
M_1(t) := linterp(P_Mb, M_bear, linterp(h, P, h_s(t))) + linterp(h, P, h_s(t))  # нагрузка
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M_dv(t) := J_Σ*ε(t) + M_nagr(t) + M_bb(t)  # необходимый момент электродвигателя
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(21 J*90*deg/s)/0.5 = 65.9734 W
P0(t) := M_1(t)*ω(t)/i_pr
ω_dv(t) := ω(t)
P_dv(t) := M_dv(t)*ω_dv(t)
# Средний момент за цикл
1/t_max*integral(|M_dv(t)|, t = 0 s .. t_max) = 0.138267 J
1/t_max*integral(|M_dv(t)*ω(t)|, t = 0 s .. t_max) = 24.6991 W
t1 := 0.35 s
sqrt(sum(P_dv(t)^2/n, t)) = 28.3156 W
sqrt(sum(M_dv(t)^2/n, t)) = 0.157253 J
ω1_max := Maximize(ω, t1)
P0_max := Maximize(P0, t1)
M0_max := Maximize(M_1, t1)
ω1_max := ω(ω1_max) = 2400 rpm
M0_max := M_1(M0_max) = 21 J
P0_max := P0(P0_max) = 31.5025 W
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M0_max = 21 J
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t1 := 0.35 s
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ω1_max := Maximize(ω, t1)
P0_max = 31.5025 W
P1_max := Maximize(P_dv, t1)
M1_max := Maximize(M_dv, t1)
ω1_max := ω(ω1_max) = 2400 rpm
M1_max := M_dv(M1_max) = 0.236949 J
P1_max := P_dv(P1_max) = 47.372 W
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n_dvig := [0; 3200; 4100]*rpm
M_dvig := [0.45; 0.1; 0]*J
M_dvg(nn) := linterp(n_dvig, M_dvig, nn)
M1_max = 0.236949 J
P_dvig(n) := M_dvg(n)*n
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ω1_max = 2400 rpm
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P1_max = 47.372 W
# Среднеквадратичные значения момента и мощности
sqrt(sum(M_dv(t)^2/n, t)) = 0.157253 J
sqrt(sum(P_dv(t)^2/n, t)) = 28.3156 W
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i_pr_1 = 132  # передаточное отношение
P1_max = 47.372 W  # максимальная мощность
ω1_max = 2400 rpm  # максимальная скорость на входном валу привода
M1_max = 0.236949 J  # максимальный момент на входном валу привода
sqrt(sum(M_dv(t)^2/n, t)) = 0.157253 J  # среднеквадратичный момент на входном валу привода
sqrt(sum(P_dv(t)^2/n, t)) = 28.3156 W  # среднеквадратичная мощность на входном валу привода
M_dvig = [0.45; 0.1; 0] J
n_dvig = [0; 3200; 4100] rpm  # характеристики электродвигателя
vectorize(n_dvig*M_dvig) = [0; 33.5103; 0] W  # мощности электродвигателя
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sum(|M_dv(t)|/n, t) = 0.138294 J  # среднний момент на входном валу привода
K_M := 0.1 N*m/(2.57 A) = 0.0389105 N*m/A  # Коэффициент момента
sum(|M_dv(t)|/n, t)/K_M = 3.55415 A  # средний ток
# ДБУ 36-3,2-24
