# Гузенков - Детали машин 1986 год 224 стр
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z_1 := 1  # количество заходов червяка
z_2 := 33  # количество зубьев колеса
# Решетов
q_min := 0.212*z_2 = 6.996
m_x := 1.5 mm  # модуль
q := 8  # коэффициент диаметра червяка
h' := 2.2  # высота витка
h'_a := 1  # высота головки витка
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# Киркач
h'_f := 1.2  # высота ножки витка
c' := 0.2  # радиальный зазор
α_x := 20 deg  # угол профиля архимедова червяка в осевом сечении витков
b_2 := 10 mm  # ширина венца з.к.
b_1 := 45 mm  # длина нарезанной части червяка
# Гузевич
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M_черв.к := 0.25*33*0.711*N*m = 5.86575 J
# Ряховский
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# передаточное отношение | 2400
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u := z_2/z_1 = 33
# Размеры зубьев червячных колес и витков червяков передач без смещения
# высота головок зубьев и витков
h_a := h'_a*m_x = 1.5 mm
# высота ножек зубьев и витков
h_f := (h'_f + c')*m_x = 2.1 mm
# высота зубьев и витков
h := h_a + h_f = 3.6 mm
# Делительные диаметры червяка и колеса
d_1 := m_x*q = 12 mm
d_2 := m_x*z_2 = 49.5 mm
# начальные диаметры червяка и колеса
d_w1 := d_1 = 12 mm
d_w2 := d_2 = 49.5 mm
# диаметры вершин червяка и колеса
d_a1 := d_1 + 2*h_a = 15 mm
d_a2 := d_2 + 2*h_a = 52.5 mm
# диаметры впадин червяка и колеса
d_f1 := d_1 - 2*h_f = 7.8 mm
d_f2 := d_2 - 2*h_f = 45.3 mm
# межосевое расстояние
a_w := 0.5*(d_1 + d_2) = 30.75 mm
# модуль
m_1 := 2*a_w/(q + z_2) = 1.5 mm
# расчетный шаг червяка и зубьев
p := m_x*π = 4.71239 mm
q1 := (2*a_w - m_x*z_2)/m_x = 8
x := (a_w - 0.5*m_x*(z_2 + q))/m_x = 0
p_z1 := p*z_1 = 4.71239 mm
# Угол подъема витков червяка и наклона зубьев колеса
γ := atan(z_1/q) = 7.12502 deg
γ_w := atan(z_1/(q + 2*x)) = 7.12502 deg
γ_w = [7; 7; 30.0589] DMS
z_2/cos(γ_w)^3 = 33.7765
# Ширина обода червячного колеса
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b_2max1 := 0.75*d_a1 = 11.25 mm  # при z1 = 1, 2
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# Гузенков
z_1 = 1  # при z1 = 4
b_2max2 := 0.67*d_a1 = 10.05 mm
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b_2 = 10 mm
b_2 ≤ b_2max1 = 1
# Чернавский
# Решетов так же
# Длина нарезанной части червяка
b_1 = 45 mm
b_1min := mm*(25 + ((11 + 0.06*z_2)*m_x/mm)) = 44.47 mm
b_1 ≥ b_1min = 1
# наружный диаметр червячного колеса
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d_am2_max1 := d_a2 + 2*m_x = 55.5 mm  # при z1 = 1
d_am2_max2 := d_a2 + 1.5*m_x = 54.75 mm  # при z1 = 2
d_am2_max3 := d_a2 + m_x = 54 mm  # при z1 = 4
d_am2 := 87.75 mm
d_am2 ≤ d_am2_max1 = 0
# Вектор окружной скорости червяка
ω_1 := 2400 rpm
ω_2 := ω_1/u = 72.7273 rpm
# оборотов ручки для открытия
v_1 := ω_1*d_w1/2 = 1.50796 m/s
# Вектор окружной скорости червячного колеса
v_2 := ω_2*d_w2/2 = 0.188496 m/s
φ_1 := 7 deg
v_s := v_1/cos(γ_w) = 1.5197 m/s
v_s.dependancy := transpose([0.01, 0.1, 0.25, 0.5, 1, 1.5, 2, 2.5, 3, 4, 7, 10, 15])
f_dependancy := transpose([0.12, 0.09, 0.075, 0.065, 0.055, 0.05, 0.045, 0.04, 0.035, 0.03, 0.026, 0.024, 0.02])
v_s := sqrt(v_1^2 + v_2^2) = 1.5197 m/s
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# КПД червячной передачи
f := linterp(v_s.dependancy, f_dependancy, v_s/(m/s)) = 0.049803
η_з.п. := 0.94  # КПД зубчатого зацепления
φ_1 := atan(f) = 2.85115 deg
atan(f) = [2; 51; 4.12603] DMS
η := tan(γ_w)/tan(γ_w + φ_1) = 0.710639
η_проект := 0.9*(1 - u/200) = 0.7515
# Условный угол обхвата
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δ_ch := asin(b_2/(d_a1 - 0.5*m_x)) = [44; 34; 4.54314] DMS
2*δ_ch = 89.1359 deg
δ_ch = 44.5679 deg
# Расчет на контактную прочность
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q_i := transpose([7.1, 8, 9, 10, 11, 12.5, 14, 16])
θ1_i := transpose([57, 72, 89, 108, 127, 157, 190, 190 + 43])
θ2_i := transpose([45, 57, 71, 86, 102, 125, 152, 152 + 33])
θ3_i := transpose([40, 51, 61, 76, 89, 110, 134, 134 + 32])
θ4_i := transpose([37, 47, 58, 70, 82, 101, 123, 123 + 30])
θ_i :=
    θ1_i if z_1 == 1
    θ2_i if z_1 == 2
    θ3_i if z_1 == 3
    θ4_i if z_1 == 4
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# Коэффициент деформации червяка
q = 8
q_x := transpose([7.1, 8, 9, 10, 11, 12.5, 14, 16])
θ_x := θ_i
transpose(θ_x) = [57, 72, 89, 108, 127, 157, 190, 233]
θ := linterp(q_x, θ_x, q) = 72
# Коэффициент концентрации нагрузки
x := 0
K_β0(θ) := 1 + (z_2/θ)^3*(1 - x)
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K_β0(θ) = 1.09628
# динамический коэффициент при v2 > 3 м/с Кv = 1..1,3
# при v2 < 3 м/с Кv = 1
K_v := 1
# Коэффициент нагрузки
δ_ch = 44.5679 deg
K_H := K_β0(θ)*K_v = 1.09628
γ_w = 7.12502 deg
# 38Х2МЮА
α_n := α_x = 20 deg
E_1 := 209*GPa  # модуль упругости червяка (сталь)
# модуль упругости колеса (бронза) | Арзамасов
E_2 := 109.8 GPa
σ_y := 580 MPa
σ_u := 685 MPa  # БрОФ 6,5  # оловяная бронза
σ_u := 700 MPa  # БрАМц9-2  # безоловяная бронза
E_2 := 90.2 GPa
σ_y := 490 MPa
E_2 := 103 GPa
σ_y := 195 MPa
σ_u := 245 MPa  # БрО10Ф1 оловянная бронза
E_2 := 110.7 GPa
σ_y := 345 MPa
σ_u := 490 MPa  # БрАЖ9-4  # безоловяная бронза
E := E_1*E_2/(E_1 + E_2) = 72.3688 GPa
# Длина линии контакта
ε_α := 2  # торцовый коэффициент перекрытия от 1,8 до 2,2
l_Σ := 1.3*d_w1/cos(γ_w) = 15.7214 mm  # В среднем
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l_Σ := 0.75*π*d_w1*2*δ_ch/(360 deg)*ε_α/cos(γ_w) = 14.1104 mm  # Решетов 237
# Момент на колесе
η = 0.710639
# 6,7 Нм на червяке макс
# 4,2 Нм длительно
T_2 := M_черв.к = 5.86575 N*m
T_1 := T_2/(u*η) = 0.250127 N*m  # момент на червяке
N_ч := ω_1*T_1 = 62.8638 W  # Мощность на червяке
# Нормальная нагрузка на единицу длины контактной линии
w_n := 2*T_2/d_2*K_H/(l_Σ*cos(γ_w)*cos(α_n)) = 19.7475 N/mm
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# Приведенный радиус кривизны
ρ_E := d_2*sin(α_n)/(2*cos(γ_w)^2) = 8.59726 mm
# Наибольшие контактные напряжения
srab := 150000 = 150000
σ_H := 0.418*sqrt(w_n*E/ρ_E) = 170.423 MPa
# Предел текучести материала
# Допускаемые напряжения и коэффициент запаса
σ_u = 490 MPa
σ_y = 345 MPa
σ_H_adm_max := 4*σ_y = 1380 MPa  # для оловянных бронз
σ_H_adm_max := 2*σ_y = 690 MPa
# для безоловянных бронз
v_s.dependancy := transpose([1, 2, 3, 4, 5, 6, 7, 8, 20])
C_v.dependancy := transpose([1.33, 1.21, 1.11, 1.02, 0.95, 0.88, 0.83, 0.8, 0.8])
n_H := σ_H_adm_max/σ_H = 4.04875
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C_v := linterp(v_s.dependancy, C_v.dependancy, v_s/(m/s)) = 1.26764
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# для безоловянных бронз
t := 600*t_крутить  # error: Эта переменная не определена.
N_HE :=
    25*10^7 if srab > 25*10^7
    10^7 if srab < 10^7
    srab otherwise
    = 10000000  # Решетов 242
σ_H_dlit := MPa*(275 - 25*s/m*v_s) = 237.008 MPa
# для оловянных бронз
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σ_H_dlit := 0.75*σ_u*C_v*nthroot(10^7/N_HE, 8) = 465.856 MPa
n_H_dlit := σ_H_dlit/σ_H = 2.73353
# Расчет на изгибную прочность
z_vx := transpose([20, 24, 26, 28, 30, 32, 35, 37, 40, 45, 50, 60, 80, 100, 150, 300])
Y_Fx := transpose([1.98, 1.88, 1.85, 1.8, 1.76, 1.71, 1.64, 1.61, 1.55, 1.48, 1.45, 1.4, 1.34, 1.30, 1.27, 1.24])
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# Чернавский
# Эквивалентное число зубьев
z_v := z_2/cos(γ_w)^3 = 33.7765
Y_F1 := 1.98 - (1.98 - 1.88)/(24 - 20)*(z_v - 20) = 1.63559  # ручная интерполяция
Y_F := linterp(z_vx, Y_Fx, z_v) = 1.66855
σ_F := w_n*cos(α_n)*cos(γ_w)*Y_F/m_x = 20.4823 MPa  # Решетов 238
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σ_F_adm_max := 0.8*σ_y = 276 MPa  # при работе постоянно в масле
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σ_F_adm_max := 0.8*σ_y*0.85 = 234.6 MPa  # при работе без масла
m_x = 1.5 mm
n_F := σ_F_adm_max/σ_F = 11.4538
N_LE :=
    25*10^6 if srab > 25*10^6
    10^6 if srab < 10^6
    srab otherwise
    = 1000000
σ_F_dlit := (0.25*σ_y + 0.08*σ_u)*nthroot(10^6/N_LE, 9) = 125.45 MPa
n_F_dlit := σ_F_dlit/σ_F = 6.12479  # Для реверсивной передачи
σ_F_dlit := (0.16*σ_u)*nthroot(10^6/N_LE, 9) = 78.4 MPa
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σ_F_dlit := 0.8*(0.25*σ_y + 0.08*σ_u)*nthroot(10^6/N_LE, 9) = 100.36 MPa
n_F_dlit := σ_F_dlit/σ_F = 4.89983
# Чернавский
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# Прочность червяка
# Окружная сила на червяке и соответствующая ей осевая сила на колесе
F_t1 := 2*T_1/d_w1 = 41.6878 N
# Окружная сила на колесе и соответствующая ей осевая сила на червяке
F_t2 := 2*T_2/d_2 = 237 N
# Радиальное усилие на колесе
α := α_x = 20 deg
F_r1 := F_t2*tan(α) = 86.2609 N
F_a1 := F_t2
# Максимальный изгибающий момент от окружной силы червяка | Расстояние между опорами вала червяка
L_ch := 70 mm = 70 mm
M_1 := F_t1*L_ch/4 = 0.729537 N*m
# Максимальный изгибающий момент от осевой силы  на червяке и радиальной силы на колесе
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M_2 := F_r1*L_ch/4 + F_a1*d_w1/4 = 2.22057 N*m
# Суммарный изгибающий момент
M := sqrt(M_1^2 + M_2^2) = 2.33734 N*m
d_ch := 12 mm = 12 mm
J_x := π*d_ch^4/64 = 1017.88 mm^4
W_x := π*d_ch^3/32 = 169.646 mm^3
σ := M/W_x = 13.7777 MPa
# Максимальное радиальное усилие на червяке
m_x*0.01 = 0.015 mm
F_p := sqrt(F_t1^2 + F_r1^2) = 95.8062 N
m_x*0.005 = 0.0075 mm
δ_ch := F_p*L_ch^3/(48*E_1*J_x) = 0.00321814 mm
δ_ch/m_x = 0.00214543
# Трение в опорах червяка
d_ch := 12 mm
μ_st := 0.1
μ_br := 0.004
d_shtur := 12.5 mm
M_tr := d_ch/2*F_p/2*(μ_st + μ_br) + μ_br*d_shtur/2*F_a1 = 0.0358165 N*m
M_shp := T_1 + M_tr = 0.285944 N*m
